*Heading
** Job name: CAX8R_SPHERE Model name: CAX8R_SPHERE
** Generated by: Abaqus/CAE 2016
*Preprint, echo=NO, model=NO, history=NO, contact=NO
**
** PARTS
**
*Part, name=PART-1
*Node
      1,          10.,           0.
      2,         10.5,           0.
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*Element, type=CAX8R
  1,   1,   3,  35,  33,   2,  23,  34,  22
  2,   3,   5,  37,  35,   4,  24,  36,  23
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*Nset, nset=SET-1, generate
   1,  661,    1
*Elset, elset=SET-1
 1,
*Elset, elset=Set-2, generate
   1,  200,    1
** Section: Section-1-SET-1
*Solid Section, elset=Set-2, material=MATERIAL-1
,
*End Part
**
**
** ASSEMBLY
**
*Assembly, name=Assembly
**
*Instance, name=PART-1-1, part=PART-1
*End Instance
**
*Nset, nset=SET-1, instance=PART-1-1
 3,
*Nset, nset=SET-2, instance=PART-1-1
 1,
*Nset, nset=SET-3, instance=PART-1-1
 2,
*Nset, nset=SET-4, instance=PART-1-1
 5,
*Nset, nset=SET-5, instance=PART-1-1
 4, 7
*Nset, nset=Set-6, instance=PART-1-1
 661,
*Nset, nset=Set-7, instance=PART-1-1
   1,   2,   3,   4,   5,   6
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*Nset, nset=Set-8, instance=PART-1-1, generate
  1,  21,   1
*Nset, nset=Set-9, instance=PART-1-1, generate
 641,  661,    1
*Nset, nset=Set-10, instance=PART-1-1
  21,  32,  53,  64,  85,  96
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*Nset, nset=Set-11, instance=PART-1-1
 661,
*End Assembly
**
** MATERIALS
**
*Material, name=MATERIAL-1
*Elastic
 2e+11, 0.3
** ----------------------------------------------------------------
**
** STEP: Step-1
**
*Step, name=Step-1, nlgeom=NO
*Static
0.1, 1., 1e-05, 1.
**
** BOUNDARY CONDITIONS
**
** Name: BC-1 Type: Displacement/Rotation
*Boundary
Set-8, 1, 1
Set-8, 2, 2
Set-8, 6, 6
** Name: BC-2 Type: Displacement/Rotation
*Boundary
Set-9, 1, 1
**
** LOADS
**
** Name: CFORCE-2   Type: Concentrated force
*Cload
Set-11, 2, -1000.
**
** OUTPUT REQUESTS
**
*Restart, write, frequency=0
**
** FIELD OUTPUT: F-Output-1
**
*Output, field
*Node Output
CF, RF, U
**
** FIELD OUTPUT: F-Output-2
**
*Element Output, directions=YES
LE, PE, PEEQ, PEMAG, S
**
** HISTORY OUTPUT: H-Output-1
**
*Output, history, variable=PRESELECT
*End Step
