*Heading
** Job name: Sat Model name: back
** Generated by: Abaqus/CAE 2016
*Preprint, echo=NO, model=NO, history=NO, contact=NO
**
** PARTS
**
*Part, name=PART-1
*Node
      1,  0.624750257,  0.195084244
      2,  0.659992933,  0.206407964
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*Element, type=CAX8R
  1,  86,  85,  83,  84, 498, 496, 495, 497
  2,   5,  86,  84,   4, 454, 497, 455, 453
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*Elset, elset=SET-1, generate
   1,  259,    1
** Section: Section-1-SET-1
*Solid Section, elset=SET-1, material=MATERIAL-1
,
*End Part
**
**
** ASSEMBLY
**
*Assembly, name=Assembly
**
*Instance, name=PART-1-1, part=PART-1
*End Instance
**
*Elset, elset=BACK, instance=PART-1-1, generate
   1,  259,    1
*Nset, nset=SET-2, instance=PART-1-1
 297, 298, 299, 300, 301, 302
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*Nset, nset=SET-3, instance=PART-1-1
   4,   5,   6,   7,   8,   9
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*End Assembly
*Amplitude, name=AMP-1
             0.,             10.,              3.,             1.5
**
** MATERIALS
**
*Material, name=MATERIAL-1
*Density
7900.,
*Elastic
 2.1e+11, 0.3
**
** BOUNDARY CONDITIONS
**
** Name: Disp-BC-1 Type: Displacement/Rotation
*Boundary
SET-2, 1, 1
** Name: Disp-BC-2 Type: Displacement/Rotation
*Boundary
SET-2, 2, 2
** Name: Disp-BC-3 Type: Displacement/Rotation
*Boundary
SET-2, 6, 6
** ----------------------------------------------------------------
**
** STEP: Step-1
**
*Step, name=Step-1, nlgeom=NO, inc=10000
*Dynamic
0.01,3.,3e-05,0.02
**
** LOADS
**
** Name: CFORCE-1   Type: Concentrated force
*Cload, amplitude=AMP-1
SET-3, 2, 1.
**
** OUTPUT REQUESTS
**
*Restart, write, frequency=0
**
** FIELD OUTPUT: F-Output-1
**
*Output, field, variable=PRESELECT
**
** HISTORY OUTPUT: H-Output-1
**
*Output, history, variable=PRESELECT
*End Step
